// COMSOL Multiphysics 5.2.0.166 model "BST_011.mph"
// Outline of the model tree

Parameters
  T0 = (0.5[W/m^2]*pi/sigma_const)^(1/2)
  Tw = 0.2
  Ew = 0.7
  Omega = 0.6
  Scatt = Omega
  abc = Scatt*(1/Omega-0.8)

Geometry
  geom1 "Geometry 1" (3D, length unit m)
    cyl1: Cylinder | pos = {5, 5, 5}; r = 0.9; h = 1.5
    fin: Finalize "Form Union"

Materials
  mat1: Common "Material 1" on all domains
    def "Basic"
      scattering = Scatt
      absorption = abc
  mat2: Common "Material 2" on all boundaries
    def "Basic"
      emissivity = Ew

Physics
  rpm: ParticipatingMediaRadiation "Radiation in Participating Media" on all domains
    rpm1: RadiationInParticipatingMedia (default) | minput_temperature = T0
    os1: OpaqueSurface (default) | epsilon_rad_mat = userdef; epsilon_rad = Ew; minput_temperature = Tw
    cib1: ContinuityOnInteriorBoundary (default)

Mesh
  mesh1 "Mesh 1"
    size: MeshSizeDefault | hmax = 0.18; hmin = 0.0324; hcurve = 0.6; hnarrow = 0.5; hgrad = 1.5; hauto = 5
    ftri1: FreeTri "Free Triangular 1" on boundaries 4
    swe1: Sweep "Swept 1" on remaining entities

Studies
  std1 "Study 1"
    stat: Stationary

Solver configurations
  sol1 "Solution 1" (study std1)
    v1: Variables "Dependent Variables 1"
    s1: Stationary "Stationary Solver 1"
      dDef: Direct
      se1: Segregated
        ss1: SegregatedStep | segvar = {comp1_rpm_I}; segvarspec = manual; linsolver = dDef; subdamp = 0.5
        ss2: SegregatedStep | segvar = {comp1_rpm_I}; segvarspec = manual; linsolver = dDef; subdamp = 0.5
        ss3: SegregatedStep | segvar = {comp1_rpm_I}; segvarspec = manual; linsolver = dDef; subdamp = 0.5
        ss4: SegregatedStep | segvar = {comp1_rpm_I}; segvarspec = manual; linsolver = dDef; subdamp = 0.5
        ss5: SegregatedStep | segvar = {comp1_rpm_I}; segvarspec = manual; linsolver = dDef; subdamp = 0.5
        ss6: SegregatedStep | segvar = {comp1_rpm_I}; segvarspec = manual; linsolver = dDef; subdamp = 0.5

Datasets
  dset1: Solution | solution = sol1

Plots
  pg1: PlotGroup3D "Incident Radiation (rpm)" | data = dset1
    slc1: Slice | expr = rpm.G; genpoints = {{0, 0, 0}, {1, 0, 0}, {0, 1, 0}}
  pg2: PlotGroup3D "Net Radiative Heat Flux (rpm)" | data = dset1
    surf1: Surface | expr = rpm.qr_net