// COMSOL Multiphysics 5.2.0.166 model "BST_08.mph"
// Outline of the model tree

Parameters
  R1 = 1.5[ohm]
  C1 = 1.2[F]
  L1 = 0.8[H]
  VC1_0 = 0.3[V]
  IL1_0 = 0.8[A]

Physics
  cir: Circuit "Electrical Circuit"
    dependent variable voltages
    gnd1: GroundNode
    R1: Resistor | R = R1; Connections = {2, 1}
    V1: VoltageSource | Connections = {1, 0}
    C1: Capacitor | C = C1; v = VC1_0; Connections = {0, 3}
    L1: Inductor | L = L1; i = IL1_0; Connections = {3, 2}
  ge: GlobalEquations "Global ODEs and DAEs"
    ge1: GlobalEquations
      name = {VC1, IL1}
      equation = {comp1.cir.C1_i-C1*VC1t, comp1.cir.L1_v-L1*IL1t}
      initialValueU = {VC1_0, IL1_0}
      initialValueUt = {0, 0}
      description = {, }
      valueType = complex
      DependentVariableQuantity = dimensionless
      CustomDependentVariableUnit = m
      SourceTermQuantity = dimensionless
      CustomSourceTermUnit = m

Studies
  std1 "Study 1"
    time: Transient "Time Dependent" | tlist = range(0,8/69,8)

Solver configurations
  sol1 "Solution 1" (study std1)
    v1: Variables "Dependent Variables 1"
    t1: Time "Time-Dependent Solver 1" | tlist = range(0,8/69,8)
      dDef: Direct
      fc1: FullyCoupled | linsolver = dDef

Datasets
  dset1: Solution | solution = sol1

Derived values
  gev1: EvalGlobal "State variable VC1" | data = dset1; expr = comp1.VC1
  gev2: EvalGlobal "State variable IL1" | data = dset1; expr = comp1.IL1

Plots
  pg1: PlotGroup1D "1D Plot Group 1" | data = dset1; xlabel = Time (s)
    glob1: Global | expr = {comp1.VC1, comp1.IL1}; descr = {State variable VC1, State variable IL1}